t1 := 4
tw := 8
x1(t) :=
    if 0 ≤ t ≤ t1
        -t^2/2 + 2*t
    if t1 < t ≤ tw
        t^2/2 + (-tw + 2)*t + tw^2/2 - 2*tw
x2(t) :=
    if 0 ≤ t ≤ t1
        -t
    if t1 < t ≤ tw
        t - tw
u(t) :=
    if 0 ≤ t ≤ t1
        -1
    if t1 < t ≤ tw
        1
# [plot: x1(t), x1(t1) vs t, t1]
# [plot: x2(t), x2(t1) vs t, t1]
# [plot: u(t) vs t]
x1_change1(x2) := x2^2/2 + 2*x2 + 2
x1_change2(x2) := -x2^2/2 - 2*x2 - 2
solve block
    # constraints
    yR'(x) == -1/yR(x)
    yR(7.5) == 0.1
    # solver
    yR := odesolve(yR(x), 1.5)
end solve block
solve block
    # constraints
    yL'(x) == -1/yL(x)
    yL(7.5) == -0.01
    # solver
    yL := odesolve(yL(x), 1.5)
end solve block
y1 := -2, -1.995 .. 10
y2 := -2, -2.005 .. -10
# [plot: y1, y2, yR(x), yL(x) vs x1_change2(y1), x1_change1(y2), x]
