t1 := 4
tw := 8
x1(t) :=
    if 0 ≤ t ≤ t1
        -t^2 + 4*t
    if t1 < t ≤ tw
        t^2 + (4 - 2*tw)*t + tw^2 - 4*tw
x2(t) :=
    if 0 ≤ t ≤ t1
        -2*t
    if t1 < t ≤ tw
        2*t - 2*tw
u(t) :=
    if 0 ≤ t ≤ t1
        -2
    if t1 < t ≤ tw
        2
# [plot: x1(t), x1(t1) vs t, t1]
# [plot: x2(t), x2(t1) vs t, t1]
# [plot: u(t) vs t]
x1_change1(y1) := -y1^2/4 - 2*y1^2
x1_change2(y2) := y2^2/4 + 2*y2^2
solve block
    # constraints
    yR'(x) == -2/yR(x)
    yR(2) == 0.1
    # solver
    yR := odesolve(yR(x), 1.8)
end solve block
solve block
    # constraints
    yL'(x) == -2/yL(x)
    yL(2) == -0.01
    # solver
    yL := odesolve(yL(x), 1.8)
end solve block
y1 := 0, 0.01 .. 10
y2 := 0, -0.01 .. -10
# [plot: y1, y2, yR(x), yL(x) vs x1_change1(y1), x1_change2(y2), x]
