# Введём в соответствии с вариантом: три численных значения постоянной времени апериодического звена T1, T2, T3, три значения коэффициента демпфирования колебаний колебательного звена ζ1, ζ2, ζ3, три значения коэффициента пропорциональности интегрирующего звена K1, K2, K3.
T1 := 0.75
T2 := 1.35
T3 := 1.85
ζ1 := 0.3
ζ2 := 0.4
ζ3 := 0.7
K1 := 5
K2 := 6
K3 := 7
# Выражения для переходных звеньев
# Апериодическое звено
h1(T, t) := 1 - e^(-t/T)
# Колебательное звено
h2(ζ, t) := 1 - (cos(sqrt(1 - ζ^2)/(2*ζ*T1)*t) + ζ/sqrt(1 - ζ^2)*sin(sqrt(1 - ζ^2)/(2*ζ*T1)*t))*e^(-t/(2*T1))
# Интегрирующее звено
h3(K, t) := K*t
t := 0, 0.01 .. ceil(10*T1)
# [plot: h1(T1, t), h1(T2, t), h1(T3, t) vs t]
# Графики переходных функций апериодического звена
T1 = 0.75
T2 = 1.35
T3 = 1.85
# [plot: h2(ζ1, t), h2(ζ2, t), h2(ζ3, t) vs t]
# Графики переходных функций колебательного звена
ζ1 = 0.3
ζ2 = 0.4
ζ3 = 0.7
# [plot: h3(K1, t), h3(K2, t), h3(K3, t) vs t]
# Графики переходных функций интегрирующего звена
K1 = 5
K2 = 6
K3 = 7
