A := [0, 1; 0, 0.5]
B := [0; 0.5]
F := [4, 0; 0, 2]
Fu := 5
B*Fu*transpose(B) = [0, 0; 0, 1.25]
F - [a, b; c, d]*B*Fu*transpose(B)*[a, b; c, d] + [a, b; c, d]*A + transpose(A)*[a, b; c, d] == 0 solve, a, b, c, d → [
    0.0, -1.1 + 1.41067359797i, -1.1 - 1.41067359797i, 0.4;
    0.0, -1.1 - 1.41067359797i, -1.1 + 1.41067359797i, 0.4;
    4.80737298907, 1.788854382, 1.788854382, 2.54992255935;
    -4.80737298907, 1.788854382, 1.788854382, -1.74992255935;
    2.34751678503i, -1.788854382, -1.788854382, 0.4 - 1.04984142193i;
    -2.34751678503i, -1.788854382, -1.788854382, 0.4 + 1.04984142193i
]
K1 := [0, -1.1 - 1.41067359797i; -1.1 + 1.41067359797i, 0.4]
K2 := [0, -1.1 + 1.41067359797i; -1.1 - 1.41067359797i, 0.4]
K3 := [4.80737298907, 1.788854382; 1.788854382, 2.54992255935]
K4 := [-4.80737298907, 1.788854382; 1.788854382, -1.74992255935]
K5 := [2.34751678503i, -1.788854382; -1.788854382, 0.4 - 1.04984142193i]
K6 := [-2.34751678503i, -1.788854382; -1.788854382, 0.4 + 1.04984142193i]
det(submatrix(K1, 0, 0, 0, 0)) > 0 and det(K1) > 0 = 0
-5*transpose(B)*K3*[x1; x2] → -6.37480639837*x2 - 4.472135955*x1
det(submatrix(K2, 0, 0, 0, 0)) > 0 and det(K2) > 0 = 0
det(submatrix(K3, 0, 0, 0, 0)) > 0 and det(K3) > 0 = 1
det(submatrix(K4, 0, 0, 0, 0)) > 0 and det(K4) > 0 = 0
u(x1, x2) := -6.37480639837*x2 - 4.472135955*x1
det(submatrix(K4, 0, 0, 0, 0)) > 0 and det(K4) > 0 = 0
-6.37480639837*0.5 + 0.5 = -2.6874
det(submatrix(K5, 0, 0, 0, 0)) > 0 and det(K5) > 0 =  # error: Эти значения нельзя сравнить.
-4.472135955*0.5 = -2.23607
det(submatrix(K6, 0, 0, 0, 0)) > 0 and det(K6) > 0 =  # error
v1(x1, x2) := x2
Au := [0, 0.5; -2.236, -2.687]
v2(x1, x2) := 0.5*x2
eigenvals(A) = [0.5; 0]
eigenvals(Au) = [-0.51465; -2.17235]
