ORIGIN := 1
tmax := 10
nn := 1000
Koef := 100
A := [0, 1; 4, -3]
B := [0; 1]
F := [4, 0; 0, 2]
Fu := 0.2
X := [1; 0]
D(t, X) := A*X - Koef*B*X[1]
eigenvals([0, 1; 4 - Koef, -3]) = [-1.5 + 9.68246i; -1.5 - 9.68246i]  # Re< 0 устойчивый фокус
S1 := rkfixed(X, 0, tmax, nn, D)
# [plot: S1[:, 2] vs S1[:, 1]]
K(k1, k2, k3) := [k1, k2; k2, k3]
k1 := 1
k2 := 2
k3 := 3
# Начальные условия матрицы К
K(k1, k2, k3) = [1, 2; 2, 3]
M(k1, k2, k3) := K(k1, k2, k3)*B*Fu^-1*transpose(B)*K(k1, k2, k3)
Ff(k1, k2, k3) := F - M(k1, k2, k3) + K(k1, k2, k3)*A + transpose(A)*K(k1, k2, k3)
Ff(k1, k2, k3) = [0, -23; -23, -57]
solve block
    # constraints
    Ff(k1, k2, k3) == [0, 0; 0, 0]
    # solver
    Mk := Find(k1, k2, k3)
    Mk = [9.894; 2; 0.649]
end solve block
K := [2.4 + 1.2*sqrt(39), 2; 2, -0.6 + 0.2*sqrt(39)]
K = [9.894, 2; 2, 0.649]
u := -1*Fu^-1*transpose(B)*K = [-10, -3.245]
# Коэффициенты оптимального регулятора
# Получим систему
C := [0, 1; -6, -sqrt(39)]
Kk1 := [Mk[1], Mk[2]; Mk[2], Mk[3]] = [9.894, 2; 2, 0.649]
K*C = [-12, -2.596; -3.894, -2.053]
|Kk1| = 2.4212
X := [2; 0]
D(t, X) := A*X - B*Fu^-1*transpose(B)*Kk1*X  # управляемая система x'=Ax+Bu, где u=-Фu^-1B^TKx
S1 := rkfixed(X, 0, tmax, nn, D)
# [plot: S1[:, 2], 0.05 vs S1[:, 1], xxx]
Tt := S1[:, 1]
Xx1 := S1[:, 2]
Xx2 := S1[:, 3]
MM := A - B*Fu^-1*transpose(B)*Kk1 = [0, 1; -6, -6.245]
C = [0, 1; -6, -6.245]
eigenvals(MM) = [-1.18601; -5.05899]  # устойчивый узел
S1 = [
    0, 2, 0;
    0.01, 1.99941, -0.116318;
    0.02, 1.9977, -0.225527;
    0.03, 1.99492, -0.327993;
    0.04, 1.99116, -0.424065;
    0.05, 1.98646, -0.514074;
    0.06, 1.9809, -0.598335;
    0.07, 1.97451, -0.677146;
    0.08, 1.96737, -0.750793;
    0.09, 1.95952, -0.819545;
    0.1, 1.951, -0.883657;
    0.11, 1.94186, -0.943374
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]
eigenvecs(MM) = [0.64461, -0.193916; -0.764512, 0.981018]
Eps := 0.05
treg :=
    for i ∈ 2 .. nn
        if (|Xx1[i - 1]| > Eps) and |Xx1[i]| < Eps
            treg ← Tt[i]
    treg
Preg :=
    Xmin ← 0
    for i ∈ 2 .. nn
        if Xx1[i] < Xmin
            Xmin ← Xx1[i]
    Preg ← |Xmin|
    Preg
treg = 3.34  # время регулирования
Uu(i) := -Fu^-1*transpose(B)*Kk1*[Xx1[i]; Xx2[i]]
func(n) :=
    for i ∈ 1 .. nn
        U[i] ← Uu(i)
    U
Preg = 0  # перерегулирование
U := func(1000)
# [plot: U vs Tt]
X := [5; 1]
S2 := rkfixed(X, 0, tmax, nn, D)
X := [-1; -1]
S3 := rkfixed(X, 0, tmax, nn, D)
# [3D plot: S1, S2, S3]
ORIGIN := 1
tmax := 10
nn := 1000
Koef := 0
A := [0, 1; 4, -3]
B := [0; 1]
F := [4, 0; 0, 2]
Fu := 0.2
X := [4; 0]
D(t, X) := A*X - Koef*B*X[1]
eigenvals([0, 1; 4 - Koef, -3]) = [1; -4]  # седло
S4 := rkfixed(X, 0, tmax, nn, D)
Koef := 50
D(t, X) := A*X - Koef*B*X[1]
eigenvals([0, 1; 4 - Koef, -3]) = [-1.5 + 6.61438i; -1.5 - 6.61438i]
S1 := rkfixed(X, 0, tmax, nn, D)
# [plot: S4[:, 2] vs S4[:, 1]]
# [3D plot: S1, S4]
# поведение нерегулируемой системы
6 - 2*sqrt(39) = -6.49
4 - 0.4*39 + 1.2*sqrt(39) = -4.106
[0, -6; 1, -sqrt(39)]*[2.4 + 1.2*sqrt(39), 2; 2, -0.6 + 0.2*sqrt(39)] + [2.4 + 1.2*sqrt(39), 2; 2, -0.6 + 0.2*sqrt(39)]*[0, 1; -6, -sqrt(39)] = [-24, -6.49; -6.49, -4.106]
