ORIGIN := 1
tmax := 10
nn := 1000
Koef := 50
A := [0, 1; 0, 0.5]
B := [0; 0.5]
F := [4, 0; 0, 2]
Fu := 0.2
X := [0.3; 0]
D(t, X) := A*X - Koef*B*X[1]
eigenvals([0, 1; 0*(1 + Koef), 0.5]) = [0.5; 0]  # Особая точка - неустойчивый фокус
S1 := rkfixed(X, 0, tmax, nn, D)
# [plot: S1[:, 2] vs S1[:, 1]]
K(k1, k2, k3) := [k1, k2; k2, k3]
k1 := 1
k2 := 1
k3 := 7
K(k1, k2, k3) = [1, 1; 1, 7]
M(k1, k2, k3) := K(k1, k2, k3)*B*Fu^-1*transpose(B)*K(k1, k2, k3)
Ff(k1, k2, k3) := F - M(k1, k2, k3) + K(k1, k2, k3)*A + transpose(A)*K(k1, k2, k3)
Ff(k1, k2, k3) = [2.75, -7.25; -7.25, -50.25]
solve block
    # constraints
    Ff(k1, k2, k3) == [0, 0; 0, 0]
    # solver
    Mk := Find(k1, k2, k3)
end solve block
Mk = [4.80737; 1.78885; 2.54992]
Kk1 := [Mk[1], Mk[2]; Mk[2], Mk[3]] = [4.80737, 1.78885; 1.78885, 2.54992]
|Kk1| = 9.05843
X := [3; 0]
D(t, X) := A*X - B*Fu^-1*transpose(B)*Kk1*X
S1 := rkfixed(X, 0, tmax, nn, D)
# [plot: S1[:, 2], 0.05, t vs S1[:, 1], xxx, 3.22]
Tt := S1[:, 1]
Xx := S1[:, 2]
Xx2 := S1[:, 3]
MM := A - B*Fu^-1*transpose(B)*Kk1 = [0, 1; -2.23607, -2.6874]  # Матрица управляемой системы ДУ
eigenvals(MM) = [-1.3437 + 0.656151i; -1.3437 - 0.656151i]  # Особая точка - устойчивый фокус
eigenvecs(MM) = [-0.499518 - 0.243923i, -0.499518 + 0.243923i; 0.831254, 0.831254]
Eps := 0.05
treg :=
    for i ∈ 2 .. nn
        if (|Xx[i - 1]| > Eps) and |Xx[i]| < Eps
            treg ← Tt[i]
    treg
# Время регулирования:
treg = 3.22
Preg :=
    Xmin ← 0
    for i ∈ 2 .. nn
        if Xx[i] < Xmin
            Xmin ← Xx[i]
    Preg ← |Xmin|
    Preg
# Перерегулирование: 0.5%
Preg = 0.00482031
Uu(i) := -(Fu^-1*transpose(B)*Kk1*[Xx[i]; Xx2[i]])
func(n) :=
    for i ∈ 1 .. nn
        U[i] ← Uu(i)
    U
U := func(1000)
# [plot: U vs Tt]
X := [2; 0]
S2 := rkfixed(X, 0, tmax, nn, D)
X := [-1; -1]
S3 := rkfixed(X, 0, tmax, nn, D)
# [3D plot: S2, S1, S3]
X := [3; 0]
Koef := 0
D(t, X) := A*X - Koef*B*X[1]
S1 := rkfixed(X, 0, tmax, nn, D)
# [plot: S1[:, 2] vs S1[:, 1]]
Koef := 50
D(t, X) := A*X - Koef*B*X[1]
S2 := rkfixed(X, 0, tmax, nn, D)
# [plot: S2[:, 2] vs S2[:, 1]]
# [3D plot: S1, S2]
